<?xml version="1.0" ?>
<Node name="lroot" gravity="0 0 0" dt="1e-4">
    <VisualStyle displayFlags="showBehavior" />
<!--     <Node name="RefPoint" >
        <MechanicalObject template="Vec3d" name="Particles"  showObject="true" restScale="1" position="0 0 0" />
        <FixedConstraint template="Vec3d" name="Fix Particles" indices="0" />
    </Node> -->
    <Node name="beam">
        <EulerImplicitSolver name="cg_odesolver"   rayleighStiffness="0.5e-5" rayleighMass="0.0" />
        <CGLinearSolver name="linear solver" iterations="25" tolerance="1e-09" threshold="1e-09" />
        <MeshGmshLoader name="meshLoader" filename="beam_hexa_coarse_01_mod.msh" />
        <HexahedronSetTopologyContainer name="topo" src="@meshLoader" />
        <MechanicalObject name="dofs" src="@meshLoader" showObject="true" />
        <HexahedronSetGeometryAlgorithms template="Vec3d" name="GeomAlgo" />
        <DiagonalMass  name="computed using mass density" massDensity="7.85e-09" />
        <HexahedronFEMForceField template="Vec3d" name="FEM" method="large" poissonRatio="0.3" youngModulus="2.1e5" />
<!--         <FixedConstraint name="FixedConstraint" indices="9 2 3" /> -->
        <LinearMovementConstraint template="Vec3d" name="LMC"  indices="0"
            keyTimes="0
0.00075
0.0015
0.00225
0.003
0.00375
0.0045
0.00525
0.006
0.00675
0.0075
0.00825
0.009
0.00975
0.0105
0.01125
0.012
0.01275
0.0135
0.01425
0.015
0.01575
0.0165
0.01725
0.018
0.01875
0.0195
0.02025
0.021
0.02175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"
            movements=" 0   -15 10
0   -15 10
0   -15 10
0   -15 10
0   -15 10
0   -15 10
0   -15 10
0   -15 10
0   -15 10
0   -15 10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" />
                    <LinearMovementConstraint template="Vec3d" name="LMC"  indices="1"
            keyTimes="0
0.00075
0.0015
0.00225
0.003
0.00375
0.0045
0.00525
0.006
0.00675
0.0075
0.00825
0.009
0.00975
0.0105
0.01125
0.012
0.01275
0.0135
0.01425
0.015
0.01575
0.0165
0.01725
0.018
0.01875
0.0195
0.02025
0.021
0.02175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"
            movements="0    -15 -10
0   -15 -10
0   -15 -10
0   -15 -10
0   -15 -10
0   -15 -10
0   -15 -10
0   -15 -10
0   -15 -10
0   -15 -10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" />
            <LinearMovementConstraint template="Vec3d" name="LMC"  indices="2"
            keyTimes="0
0.00075
0.0015
0.00225
0.003
0.00375
0.0045
0.00525
0.006
0.00675
0.0075
0.00825
0.009
0.00975
0.0105
0.01125
0.012
0.01275
0.0135
0.01425
0.015
0.01575
0.0165
0.01725
0.018
0.01875
0.0195
0.02025
0.021
0.02175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"
            movements="0    15  10
0   15  10
0   15  10
0   15  10
0   15  10
0   15  10
0   15  10
0   15  10
0   15  10
0   15  10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" />
            <LinearMovementConstraint template="Vec3d" name="LMC"  indices="3"
            keyTimes="0
0.00075
0.0015
0.00225
0.003
0.00375
0.0045
0.00525
0.006
0.00675
0.0075
0.00825
0.009
0.00975
0.0105
0.01125
0.012
0.01275
0.0135
0.01425
0.015
0.01575
0.0165
0.01725
0.018
0.01875
0.0195
0.02025
0.021
0.02175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"
            movements="0    15  -10
0   15  -10
0   15  -10
0   15  -10
0   15  -10
0   15  -10
0   15  -10
0   15  -10
0   15  -10
0   15  -10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" />
    </Node>
</Node>
